// SBML level 3 version 2
// Created with https://github.com/matthiaskoenig/sbmlutils.

model hctz_fluid(BW, f_renal_function, GFR_base, hctz)
  // Model for renal body fluid system for blood pressure regulation.
  // Model for blood pressure regulation based on extracellular fluid (ECF) volume and ion balance.
  // The content of this model has been carefully created in a manual research effort.
  // Terms of use
  // Copyright © 2026 Matthias König.
  // This work is licensed under a Creative Commons Attribution 4.0 International License.
  // Redistribution and use of any part of this model, with or without modification, are permitted provided that the following conditions are met:
  // Redistributions of this SBML file must retain the above copyright notice, this list of conditions and the following disclaimer.
  // Redistributions in a different form must reproduce the above copyright notice, this list of conditions and the following disclaimer in the documentation and/or other materials provided with the distribution.
  // This model is distributed in the hope that it will be useful, but WITHOUT ANY WARRANTY; without even the implied warranty of MERCHANTABILITY or FITNESS FOR A PARTICULAR PURPOSE.
  // hasTaxon taxonomy:9606 snomedct:337915000
  // hasProperty mamo:MAMO_0000046 ncit:C49184 ncit:C15299 ncit:C3117
  // ncit:C29098
  // isDescribedBy doi:10.5281/zenodo.15427418
  // model units - substance: mmole, time: min, volume: litre, area: m2, length: metre, extent: mmole

  // Compartments:
  compartment ECF = ECF_ref; ECF has litre; ECF is "extracellular fluid (ECF)";  // SBO:0000290 ncit:C13356 BTO:0000131
  compartment Vloop = 0.05*ECF_ref; Vloop has litre; Vloop is "loop of Henle";  // SBO:0000290 FMA:17698 BTO:0004608 ncit:C33006
  compartment Vurine = 1e-12 litre;  // SBO:0000290 FMA:12274 ncit:C13283 BTO:0001419
  compartment Vki = NaN; Vki has litre; Vki is "kidney";  // SBO:0000290 FMA:7203 BTO:0000671 ncit:C12415

  // Species:
  // This should be the concentration in the kidney, but no kidney compartment in the fluid model.
  species hctz in ECF = 0; hctz is "hydrochlorothiazide";  // SBO:0000247 ncit:C29098 CHEBI:5778 pubchem.compound:3639
  // Concentration in mM corresponding to mEq/l.
  species na in ECF = na_ref; na is "Sodium (Na+) (ECF)";  // SBO:0000247 CHEBI:29101
  // Concentration in mM corresponding to mEq/l.
  species na_loop in Vloop = 140; na_loop is "Sodium (Na+) (Loop of Henle)";  // SBO:0000247 CHEBI:29101
  // Concentration in mM corresponding to mEq/l.
  substanceOnly species na_urine in Vurine = 0; na_urine is "Sodium (Na+) (urine)";  // SBO:0000247 CHEBI:29101
  // Concentration in mM corresponding to mEq/l.
  species cl in ECF = cl_ref; cl is "Chloride (Cl-) (ECF)";  // SBO:0000247 CHEBI:17996
  // Concentration in mM corresponding to mEq/l.
  species cl_loop in Vloop = 102; cl_loop is "Chloride (Cl-) (Loop of Henle)";  // SBO:0000247 CHEBI:17996
  // Concentration in mM corresponding to mEq/l.
  substanceOnly species cl_urine in Vurine = 0; cl_urine is "Chloride (Cl-) (urine)";  // SBO:0000247 CHEBI:17996

  // Parameters:
  BW = 75 kg; BW is "body weight";  // SBO:0000002
  // 1.0: increased kidney function 1.0: normal kidney function (healthy control) <1.0: decreased kidney function
  f_renal_function = 1 dimensionless;  // SBO:0000009
  GFR_base = 100 ml_per_min; GFR_base is "glomerular filtration rate (base)";
  // male: 0.6 l/kg female: 0.5 l/kg
  f_TBW = 0.55 l_per_kg; f_TBW is "Total body water (TBW) fraction of bodyweight (male)";  // SBO:0000002
  // Around 1/3 of total body water (TBW) is extracellular fluid (ECF).
  f_ECF = 0.33 dimensionless; f_ECF is "ECF fraction of TBW";  // SBO:0000002
  // ECF value is calculated based on body weight and sex.
  ECF_ref has litre; ECF_ref is "Reference extracellular fluid volume (ECF)";  // SBO:0000002
  // Psys value is dependent on sex and age.
  // Young Adult Men (18-39 years): Average=120/80 mmHg
  // Middle-aged Men (40-59 years): Average=125−130/80−85 mmHg
  // Older Men (60+ years): Average=135−140/85−90 mmHg
  // Young Adult Women (18-39 years): Average=110−120/70−80mmHg
  // Middle-aged Women (40-59 years): Average=120−130/80−85mmHg
  // Older Women (60+ years): Average=135−140/85−90mmHg
  Psys_ref = 120 mmHg; Psys_ref is "Reference systolic blood pressure";  // SBO:0000002
  // Psys value is dependent on sex and age.
  // Young Adult Men (18-39 years): Average=120/80 mmHg
  // Middle-aged Men (40-59 years): Average=125−130/80−85 mmHg
  // Older Men (60+ years): Average=135−140/85−90 mmHg
  // Young Adult Women (18-39 years): Average=110−120/70−80mmHg
  // Middle-aged Women (40-59 years): Average=120−130/80−85mmHg
  // Older Women (60+ years): Average=135−140/85−90mmHg
  Pdia_ref = 80 mmHg; Pdia_ref is "Reference diastolic blood pressure";  // SBO:0000002
  bp_systolic has mmHg; bp_systolic is "Systolic blood pressure";  // SBO:0000002
  bp_diastolic has mmHg; bp_diastolic is "Diastolic blood pressure";  // SBO:0000002
  Mr_nacl = 58.44 g_per_mole; Mr_nacl is "Molecular weight sodium chloride";  // SBO:0000002
  Mr_na = 22.99 g_per_mole; Mr_na is "Molecular weight sodium";  // SBO:0000002
  Mr_cl = 35.45 g_per_mole; Mr_cl is "Molecular weight chloride";  // SBO:0000002
  vin_na has mmole_per_min; vin_na is "Na uptake via food";  // SBO:0000002
  vin_cl has mmole_per_min; vin_cl is "Cl uptake via food";  // SBO:0000002
  vin_h2o = 0.001597222 l_per_min; vin_h2o is "H2O uptake via food";  // SBO:0000002
  // Excretion rate sodium urine.
  k_na = 0.0006459968 l_per_min;  // SBO:0000002
  // Excretion rate chloride urine.
  k_cl = 0.003002476 l_per_min;  // SBO:0000002
  // Excretion rate water urine.
  k_h2o = vin_h2o/GFR_base; k_h2o has l_per_ml;
  h2o_reabsorption has l_per_min; h2o_reabsorption is "H2O reabsorption from loop of Henle";  // SBO:0000002
  // Excretion rate water urine.
  diuresis has l_per_min;
  // Counter-regulation feedback.
  counter_gamma = 5 dimensionless;
  // E50 for HCTZ effect on sodium and chloride excretion.
  E50_hctz_nacl = 0.0001576861 mM;
  // gamma for HCTZ effect on sodium and chloride excretion.
  gamma_hctz_nacl = 3.13952 dimensionless;
  // Emax for HCTZ effect on sodium excretion.
  Emax_hctz_na = 1.854613 dimensionless;
  // Emax for HCTZ effect on chloride excretion.
  Emax_hctz_cl = 1.007298 dimensionless;
  // reference sodium concentration.
  na_ref = 140 mM;
  // reference chloride concentration.
  cl_ref = 102 mM;
  GFR has ml_per_min; GFR is "glomerular filtration rate";
  vout_na has mg_per_min;
  vout_cl has mg_per_min;
  H2O_UPTAKE has l_per_min;

  // Assignment rules:
  ECF_ref := f_ECF*f_TBW*BW;
  // Simplified calculation of blood pressure based on change relative to reference ECF volume.
  // Regulation is more complicated probably via: Increased ECF volume → Increased blood volume → Increased venous return → Increased cardiac output → Increased blood pressure.
  bp_systolic := Psys_ref*ECF/ECF_ref;
  // Simplified calculation of blood pressure based on change relative to reference ECF volume.
  // Regulation is more complicated probably via: Increased ECF volume → Increased blood volume → Increased venous return → Increased cardiac output → Increased blood pressure.
  bp_diastolic := Pdia_ref*ECF/ECF_ref;
  vin_na := k_na*na_ref;
  vin_cl := k_cl*cl_ref;
  GFR := f_renal_function*GFR_base;
  // Excretion sodium.
  vout_na := NA_EXCRETION*Mr_na;
  // Excretion chloride.
  vout_cl := CL_EXCRETION*Mr_cl;
  // Water uptake.
  H2O_UPTAKE := vin_h2o*ECF_ref^counter_gamma/ECF^counter_gamma;
  // Excretion rate water urine.
  diuresis := k_h2o*GFR*ECF^counter_gamma/ECF_ref^counter_gamma*NA_EXCRETION/vin_na;
  // Reabsoption rate water Loop of Henle.
  h2o_reabsorption := GFR*0.001 l_per_ml - diuresis;

  // Rate rules:
  // Rate rule for calculation of water change ECF.
  ECF' = H2O_UPTAKE - GFR*0.001 l_per_ml + h2o_reabsorption;
  // Rate rule for calculation of water change urine.
  Vloop' = GFR*0.001 l_per_ml - diuresis - h2o_reabsorption;
  // Rate rule for calculation of water change urine.
  Vurine' = diuresis;

  // Reactions:
  // Na uptake increased when concentrations too low.
  NA_UPTAKE: => na; vin_na*na_ref^counter_gamma/na^counter_gamma; NA_UPTAKE is "Na uptake via food";  // SBO:0000655
  // Cl uptake increased when concentrations too low.
  CL_UPTAKE: => cl; vin_cl*cl_ref^counter_gamma/cl^counter_gamma; CL_UPTAKE is "Cl uptake via food";  // SBO:0000655
  NA_FILTRATION: na => na_loop; GFR*0.001 l_per_ml*na; NA_FILTRATION is "Na filtration kidney";  // SBO:0000655
  NA_EXCRETION: na_loop => na_urine; k_na*na_loop*(1 + Emax_hctz_na*hctz^gamma_hctz_nacl/(hctz^gamma_hctz_nacl + E50_hctz_nacl^gamma_hctz_nacl)); NA_EXCRETION is "Na excretion urine";  // modifiers: hctz; SBO:0000655
  NA_REABSORPTION: na_loop => na; h2o_reabsorption*na_loop; NA_REABSORPTION is "Na reabsorption kidney";  // SBO:0000655
  CL_FILTRATION: cl => cl_loop; GFR*0.001 l_per_ml*cl; CL_FILTRATION is "Cl filtration kidney";  // SBO:0000655
  CL_EXCRETION: cl_loop => cl_urine; k_cl*cl_loop*(1 + Emax_hctz_cl*hctz^gamma_hctz_nacl/(hctz^gamma_hctz_nacl + E50_hctz_nacl^gamma_hctz_nacl)); CL_EXCRETION is "Cl excretion urine";  // modifiers: hctz; SBO:0000655
  CL_REABSORPTION: cl_loop => cl; h2o_reabsorption*cl_loop; CL_REABSORPTION is "Cl reabsorption kidney";  // SBO:0000655

  // Unit definitions:
  unit g_per_mole = gram / mole; g_per_mole is "g/mole";
  unit kg = 1000 gram;
  unit l_per_kg = litre / (1000 gram); l_per_kg is "l/kg";
  unit l_per_min = litre / (60 second); l_per_min is "l/min";
  unit l_per_min_mmole = litre / (60 second * 1e-3 mole); l_per_min_mmole is "l/min/mmole";
  unit l_per_ml = litre / (1e-3 litre); l_per_ml is "l/ml";
  unit m2 = metre^2; m2 is "meter^2";
  unit mM = 1e-3 mole / litre; mM is "mmole/liter";
  unit mg = 1e-3 gram;
  unit mg_per_min = 1e-3 gram / (60 second); mg_per_min is "mg/min";
  unit min = 60 second;
  unit ml = 1e-3 litre;
  unit ml_per_min = 1e-3 litre / (60 second); ml_per_min is "ml/min";
  unit mmHg = 133.3224 newton / metre^2; mmHg is "133.32239 N/m^2";
  unit mmole = 1e-3 mole;
  unit mmole_per_l_ml = 1e-3 mole / (litre * 1e-3 litre); mmole_per_l_ml is "mmole/l/ml";
  unit mmole_per_min = 1e-3 mole / (60 second); mmole_per_min is "mmole/min";
  unit mmole_per_min_l = 1e-3 mole / (60 second * litre); mmole_per_min_l is "mmole/min/liter";
  unit per_hr = 1 / (3600 second); per_hr is "1/hr";
  unit per_min = 1 / (60 second); per_min is "1/min";
  unit per_min_l = 1 / (60 second * litre); per_min_l is "1/min/liter";
end
