// SBML level 3 version 2
// Created with https://github.com/matthiaskoenig/sbmlutils.

model hctz_intestine(PODOSE_hctz, Ka_dis_hctz, Mr_hctz, Vext, Vgu, Vlumen, Vfeces, Vstomach, hctz_lumen, hctz_ext, hctz_feces)
  // Model for hydrochlorothiazide absorption in the small intestine
  // Model for hydrochlorothiazide absorption
  // The content of this model has been carefully created in a manual research effort.
  // Terms of use
  // Copyright © 2026 Matthias König.
  // This work is licensed under a Creative Commons Attribution 4.0 International License.
  // Redistribution and use of any part of this model, with or without modification, are permitted provided that the following conditions are met:
  // Redistributions of this SBML file must retain the above copyright notice, this list of conditions and the following disclaimer.
  // Redistributions in a different form must reproduce the above copyright notice, this list of conditions and the following disclaimer in the documentation and/or other materials provided with the distribution.
  // This model is distributed in the hope that it will be useful, but WITHOUT ANY WARRANTY; without even the implied warranty of MERCHANTABILITY or FITNESS FOR A PARTICULAR PURPOSE.
  // hasTaxon taxonomy:9606 snomedct:337915000
  // hasProperty mamo:MAMO_0000046 ncit:C49184 ncit:C15299 ncit:C3117 ncit:C79369
  // ncit:C29098
  // isDescribedBy doi:10.5281/zenodo.15427418
  // occursIn FMA:45615 BTO:0000545 ncit:C12736 FMA:7199 BTO:0000648
  // model units - substance: mmole, time: min, volume: litre, area: m2, length: metre, extent: mmole

  // Compartments:
  compartment Vext = 1 litre; Vext is "plasma";  // SBO:0000290 ncit:C13356 BTO:0000131
  compartment Vgu = 1.2825 litre; Vgu is "intestine";  // SBO:0000290 FMA:45615 BTO:0000545 ncit:C12736
  compartment Vlumen = 1.15425 litre; Vlumen is "intestinal lumen (inner part of intestine)";  // SBO:0000290 FMA:14586 UBERON:0018543
  compartment Vfeces = 1 litre;  // SBO:0000290 FMA:64183 ncit:C13234 BTO:0000440
  compartment Ventero = NaN; Ventero has litre; Ventero is "intestinal lining (enterocytes)";  // SBO:0000290
  compartment Vapical = NaN; Vapical has m2; Vapical is "apical membrane (intestinal membrane enterocytes)";  // 2-D; SBO:0000290 FMA:84666 GO:0016324
  compartment Vbaso = NaN; Vbaso has m2; Vbaso is "basolateral membrane (intestinal membrane enterocytes)";  // 2-D; SBO:0000290 FMA:84669 GO:0016323
  compartment Vstomach = 1 litre;  // SBO:0000290 FMA:7148 ncit:C12391 UBERON:0000945

  // Species:
  substanceOnly species $hctz_stomach in Vstomach = 0; hctz_stomach is "hydrochlorothiazide (stomach)";  // SBO:0000247 ncit:C29098 CHEBI:5778 pubchem.compound:3639
  species hctz_lumen in Vlumen = 0; hctz_lumen is "hydrochlorothiazide (intestinal volume)";  // SBO:0000247 ncit:C29098 CHEBI:5778 pubchem.compound:3639
  species hctz_ext in Vext = 0; hctz_ext is "hydrochlorothiazide (plasma)";  // SBO:0000247 ncit:C29098 CHEBI:5778 pubchem.compound:3639
  substanceOnly species hctz_feces in Vfeces = 0; hctz_feces is "hydrochlorothiazide (feces)";  // SBO:0000247 ncit:C29098 CHEBI:5778 pubchem.compound:3639

  // Parameters:
  // Fraction absorbed, i.e., only a fraction of the hydrochlorothiazide in the intestinal lumen is absorbed. This parameter determines how much of the hydrochlorothiazide is excreted.
  // F_hctz_abs of dose is absorbed. (1-F_hctz_abs) is excreted in feces.
  // around 11-25% of dose recovered in feces {Beerman1976} around 60-70 percent urinary recovery of oral dose ~70-80 percent urinary recovery of oral dose [Barbhaiya1982] ~70 percent after oral dose, ~93% IV dose [Beerman1976]
  F_hctz_abs = 0.6121312 dimensionless; F_hctz_abs is "fraction absorbed hydrochlorothiazide";  // SBO:0000002
  HCTZABS_k = 0.02041377 per_min; HCTZABS_k is "rate of hydrochlorothiazide absorption";  // SBO:0000009
  PODOSE_hctz = 0 mg; PODOSE_hctz is "oral dose hydrochlorothiazide [mg]";  // SBO:0000002
  POSTOMACH_hctz = 0 mg; POSTOMACH_hctz is "oral dose in stomach hydrochlorothiazide [mg]";  // SBO:0000002
  // Fast application to shift applied dose in the stomach.
  Ka_application_hctz = 1000 per_hr; Ka_application_hctz is "Ka [1/hr] application hydrochlorothiazide";  // SBO:0000002
  Ka_dis_hctz = 2 per_hr; Ka_dis_hctz is "Ka_dis [1/hr] dissolution hydrochlorothiazide";  // SBO:0000002
  Mr_hctz = 297.7 g_per_mole; Mr_hctz is "Molecular weight hydrochlorothiazide [g/mole]";  // SBO:0000647
  absorption has mmole_per_min; absorption is "absorption hydrochlorothiazide";

  // Assignment rules:
  absorption := HCTZABS_k*Vgu*hctz_lumen;

  // Rate rules:
  PODOSE_hctz' = -application_hctz*Mr_hctz;
  POSTOMACH_hctz' = (application_hctz - dissolution_hctz)*Mr_hctz;

  // Reactions:
  HCTZABS: hctz_lumen => hctz_ext; F_hctz_abs*absorption; HCTZABS is "absorption hydrochlorothiazide";  // SBO:0000655
  HCTZEXC: hctz_lumen => hctz_feces; (1 - F_hctz_abs)*absorption; HCTZEXC is "excretion hydrochlorothiazide (feces)";  // SBO:0000655
  application_hctz: => $hctz_stomach; Ka_application_hctz/(60 min_per_hr)*PODOSE_hctz/Mr_hctz; application_hctz is "PO application hydrochlorothiazide";
  dissolution_hctz: $hctz_stomach => hctz_lumen; Ka_dis_hctz/(60 min_per_hr)*POSTOMACH_hctz/Mr_hctz; dissolution_hctz is "dissolution hydrochlorothiazide";

  // Unit definitions:
  unit g_per_mole = gram / mole; g_per_mole is "g/mole";
  unit l_per_min = litre / (60 second); l_per_min is "l/min";
  unit l_per_min_mmole = litre / (60 second * 1e-3 mole); l_per_min_mmole is "l/min/mmole";
  unit m2 = metre^2; m2 is "meter^2";
  unit mM = 1e-3 mole / litre; mM is "mmole/liter";
  unit mg = 1e-3 gram;
  unit mg_per_min = 1e-3 gram / (60 second); mg_per_min is "mg/min";
  unit min = 60 second;
  unit min_per_hr = 60 second / (3600 second); min_per_hr is "min/hr";
  unit mmole = 1e-3 mole;
  unit mmole_per_min = 1e-3 mole / (60 second); mmole_per_min is "mmole/min";
  unit mmole_per_min_l = 1e-3 mole / (60 second * litre); mmole_per_min_l is "mmole/min/liter";
  unit per_hr = 1 / (3600 second); per_hr is "1/hr";
  unit per_min = 1 / (60 second); per_min is "1/min";
  unit per_min_l = 1 / (60 second * litre); per_min_l is "1/min/liter";
end
